###############################
# LAMMPS INPUT SCRIPT
# Find minimum energy fcc ( face-centered cubic ) atomic configuration
# Mark Tschopp
# Syntax, lmp_exe < calc_fcc.in

###############################
# INITIALIZATION
clear
units metal
dimension 3
boundary p p p
atom_style atomic
atom_modify map array


###############################
# Atom definition
lattice fcc ${latconst} orient x 1 0 0 orient y 0 1 0 orient z 0 0 1
region box block 0 1 0 1 0 1 units lattice
create_box 1 box
create_atoms 1 box
replicate 1 1 1


###############################
# Define interatomic potential
pair_style eam/alloy
pair_coeff * * Al99.eam.alloy Al
neighbor 2.0 bin
neigh_modify delay 10 check yes


###############################
# Run
run 0

variable natoms equal "count(all)"
variable teng equal "pe"
variable length equal "lx"
variable ecoh equal "v_teng/v_natoms"

print "Total energy (eV) = ${teng};"
print "Number of atoms = ${natoms};"
print "Lattice constant (Angstoms) = ${length};"
print "Cohesive energy (eV) = ${ecoh};"
print "%% ecoh = ${ecoh};"

print "All done!"
